max := 0
kn := 0
ke := 7
kh := 1
k := kn, kn + kh .. ke
x(k) := 1.8*cos(2*k - 3.7)/sqrt(|k - 1.6|)
sum({
    if x(k) > 0
        x(k)
    else
        0
}, k = 0 .. 7) = 3.69498
x(k) = [-1.20687; -0.299408; 2.71894; -1.01359; -0.465687; 0.976049; -0.370172; -0.496382]
