xn := 1.2
xk := 2.8
hx := 0.7
z(x, y) :=
    if |x^2 + y^2| ≤ 2
        cot(x + y)
    else if |x^2 + y^2| < 5
        x^2 + y^3
    else if |x^2 + y^2 ≥ 5|
        x - y
yn := 0.3
yk := 0.75
hy := 0.45
x := xn, xn + hx .. xk
y := yn, yn + hy .. yk
x = [1.2; 1.9; 2.6]
y = [0.3; 0.75]
mini := min([0.071; 1.862; 3.637; 4.032; 2.3; 1.85]) = 0.071
z(x, y) = [0.0709148; 1.86187; 3.637; 4.03187; 2.3; 1.85]
sum := sum([0.071; 1.862; 3.637; 4.032; 2.3; 1.85]) = 13.752
