xn := 0.15
hx := 0.4
xk := 0.55
yn := 0.4
hy := 3
yk := 4
x := xn, xn + hx .. xk
y := yn, yn + hy .. yk
z(x, y) := max(cos(x^3 - sqrt(y)), nthroot(x*y^2, 3))
x = [0.15; 0.55]
y = [0.4; 3.4]
z(x, y) = [0.808569; 1.20139; 0.893337; 1.85257]
