z(x, y) :=
    if x + 0.5*y ≤ 1
        x/sin(y)^2
    else if 1 < x + 0.5*y < 5
        e^x + e^y
    else if x + 0.5*y ≥ 5
        ln(3*(x + y)) + 2.12
x1 := 0.5
y1 := 1
z(x1, y1) = 0.706141
x2 := 0.7
y2 := 2
z(x2, y2) = 9.40281
x3 := 3
y3 := 6
z(x3, y3) = 5.41584
x1 + 0.5*y1 = 1
z1 := x1/sin(y1)^2 = 0.706141
x2 + 0.5*y2 = 1.7
z2 := e^x2 + e^y2 = 9.40281
x3 + 0.5*y3 = 6
z3 := ln(3*(x3 + y3)) + 2.12 = 5.41584
