u(x, y) :=
    if x + y ≥ 2
        max(sqrt((x + 5.7)^4 + 2), log(|x|)/(5*x))
    else if x + y < 2
        tan(|y - 4|/(3*x^2))
x1 := 1
y1 := 2
u(x1, y1) = 44.9123
x2 := 1
y2 := 0.5
u(x2, y2) = 2.33825
x1 + y1 = 3
u11 := sqrt((x1 + 5.7)^4 + 2) = 44.9123
u12 := log(|x1|)/(5*x1) = 0
max(u11, u12) = 44.9123
x2 + y2 = 1.5
u2 := tan(|y2 - 4|/(3*x2^2)) = 2.33825
